// SBML level 2 version 1

model curto()
  // This is a purine metabolism model that is geared toward studies of gout.
  // The model is fully described in Curto et al., MBSC 151 (1998) pp 1-49
  // The model uses Generalized Mass Action (GMA;i.e. power law) descriptions of reaction rate laws.
  // Such descriptions are local approximations that assume independent substrate binding.
  // The de novo purine flux vden= 2.39 is in umole/min/KG, i.e. 2.4*60=144 uM/h if we let each Kg be a
  // liter of water. Morrison and Allegra (JBC, 1989) have vden at 650 uM/h (model) and 415 (exp).
  // The IC's below have been set to the system's steady state.
  // The units in this model are micromolar(uM) and minutes.
  // A cell volume of 1 is used so that amounts and concentrations are the same thing.

  // Compartments:
  compartment cell = 1;

  // Species:
  species PRPP in cell = 5.01742;
  species IMP in cell = 98.2634;
  species SAMP in cell = 0.198189;
  species ATP in cell = 2475.35;
  species SAM in cell = 3.99187;
  species Ade in cell = 0.98473;
  species XMP in cell = 24.793;
  species GTP in cell = 410.223;
  species dATP in cell = 6.01413;
  species dGTP in cell = 3.02581;
  species RNA in cell = 28680.5;
  species DNA in cell = 5179.34;
  species HX in cell = 9.51785;
  species Xa in cell = 5.05941;
  species Gua in cell = 5.50638;
  species UA in cell = 100.293;
  species $R5P in cell = 18;
  species $Pi in cell = 1400;

  // Reactions:
  ada: ATP => HX; aada*ATP^fada4;
    aada = 0.001062; fada4 = 0.97;
  ade: Ade => ; aade*Ade^fade6;
    aade = 0.01; fade6 = 0.55;
  adna: dATP => DNA; aadna*dATP^adna_fdnap9*dGTP^adna_fdnap10;  // modifiers: dGTP
    aadna = 3.2789; adna_fdnap9 = 0.42; adna_fdnap10 = 0.33;
  adrnr: ATP => dATP; aadrnr*ATP^fadrnr4*dATP^fadrnr9*dGTP^fadrnr10;  // modifiers: dGTP
    aadrnr = 0.0602; fadrnr4 = 0.1; fadrnr9 = -0.3; fadrnr10 = 0.87;
  ampd: ATP => IMP; aampd*ATP^fampd4*GTP^fampd8*Pi^fampd18;  // modifiers: GTP, Pi
    aampd = 0.02688; fampd4 = 0.8; fampd8 = -0.03; fampd18 = -0.1;
  aprt: PRPP + Ade => ATP; aaprt*PRPP^faprt1*ATP^faprt4*Ade^faprt6;
    aaprt = 233.8; faprt1 = 0.5; faprt4 = -0.8; faprt6 = 0.75;
  arna: ATP => RNA; aarna*ATP^arna_frnap4*GTP^arna_frnap8;  // modifiers: GTP
    aarna = 614.5; arna_frnap4 = 0.05; arna_frnap8 = 0.13;
  asuc: IMP => SAMP; aasuc*IMP^fasuc2*ATP^fasuc4*GTP^fasuc8*Pi^fasuc18;  // modifiers: ATP, GTP, Pi
    aasuc = 3.5932; fasuc2 = 0.4; fasuc4 = -0.24; fasuc8 = 0.2; fasuc18 = -0.05;
  asli: SAMP => ATP; aasli*SAMP^fasli3*ATP^fasli4;
    aasli = 66544; fasli3 = 0.99; fasli4 = -0.95;
  dada: dATP => HX; adada*dATP^fdada9;
    adada = 0.03333; fdada9 = 1;
  den: PRPP => IMP; aden*PRPP^fden1*IMP^fden2*ATP^fden4*GTP^fden8*Pi^fden18;  // modifiers: dGTP, ATP, GTP, Pi
    aden = 5.2728; fden1 = 2; fden2 = -0.06; fden4 = -0.25; fden8 = -0.2; fden18 = -0.08;
  dgnuc: dGTP => Gua; adgnuc*dGTP^fdgnuc10;
    adgnuc = 0.03333; fdgnuc10 = 1;
  dnaa: DNA => dATP; adnaa*DNA^dnaa_fdnan12;
    adnaa = 0.001938; dnaa_fdnan12 = 1;
  dnag: DNA => dGTP; adnag*DNA^dnag_fdnan12;
    adnag = 0.001318; dnag_fdnan12 = 1;
  gdna: dGTP => DNA; agdna*dATP^gdna_fdnap9*dGTP^gdna_fdnap10;  // modifiers: dATP
    agdna = 2.2296; gdna_fdnap9 = 0.42; gdna_fdnap10 = 0.33;
  gdrnr: GTP => dGTP; agdrnr*GTP^fgdrnr8*dATP^fgdrnr9*dGTP^fgdrnr10;  // modifiers: dATP
    agdrnr = 0.1199; fgdrnr8 = 0.4; fgdrnr9 = -1.2; fgdrnr10 = -0.39;
  gmpr: GTP => IMP; agmpr*IMP^fgmpr2*ATP^fgmpr4*XMP^fgmpr7*GTP^fgmpr8;  // modifiers: XMP, ATP
    agmpr = 0.3005; fgmpr2 = -0.15; fgmpr4 = -0.07; fgmpr7 = -0.76; fgmpr8 = 0.7;
  gmps: XMP => GTP; agmps*ATP^fgmps4*XMP^fgmps7;  // modifiers: ATP
    agmps = 0.3738; fgmps4 = 0.12; fgmps7 = 0.16;
  gnuc: GTP => Gua; agnuc*GTP^fgnuc8*Pi^fgnuc18;  // modifiers: Pi
    agnuc = 0.2511; fgnuc8 = 0.9; fgnuc18 = -0.34;
  gprt: Gua + PRPP => GTP; agprt*PRPP^fgprt1*GTP^fgprt8*Gua^fgprt15;
    agprt = 361.69; fgprt1 = 1.2; fgprt8 = -1.2; fgprt15 = 0.42;
  grna: GTP => RNA; agrna*ATP^grna_frnap4*GTP^grna_frnap8;  // modifiers: ATP
    agrna = 409.6; grna_frnap4 = 0.05; grna_frnap8 = 0.13;
  gua: Gua => Xa; agua*Gua^fgua15;
    agua = 0.4919; fgua15 = 0.5;
  hprt: HX + PRPP => IMP; ahprt*PRPP^fhprt1*IMP^fhprt2*HX^fhprt13;
    ahprt = 12.569; fhprt1 = 1.1; fhprt2 = -0.89; fhprt13 = 0.48;
  hx: HX => ; ahx*HX^fhx13;
    ahx = 0.003793; fhx13 = 1.12;
  hxd: HX => Xa; ahxd*HX^fhxd13;
    ahxd = 0.2754; fhxd13 = 0.65;
  impd: IMP => XMP; aimpd*IMP^fimpd2*XMP^fimpd7*GTP^fimpd8;  // modifiers: GTP
    aimpd = 1.2823; fimpd2 = 0.15; fimpd7 = -0.09; fimpd8 = -0.03;
  inuc: IMP => HX; ainuc*IMP^finuc2*Pi^finuc18;  // modifiers: Pi
    ainuc = 0.9135; finuc2 = 0.8; finuc18 = -0.36;
  mat: ATP => SAM; amat*ATP^fmat4*SAM^fmat5;
    amat = 7.2067; fmat4 = 0.2; fmat5 = -0.6;
  polyam: SAM => Ade; apolyam*SAM^fpolyam5;
    apolyam = 0.29; fpolyam5 = 0.9;
  prpps: $R5P => PRPP; aprpps*PRPP^fprpps1*ATP^fprpps4*GTP^fprpps8*R5P^fprpps17*Pi^fprpps18;  // modifiers: ATP, GTP, Pi
    aprpps = 0.9; fprpps1 = -0.03; fprpps4 = -0.45; fprpps8 = -0.04; fprpps17 = 0.65; fprpps18 = 0.7;
  pyr: PRPP => ; apyr*PRPP^fpyr1;
    apyr = 1.2951; fpyr1 = 1.27;
  rnaa: RNA => ATP; arnaa*RNA^rnaa_frnan11;
    arnaa = 0.06923; rnaa_frnan11 = 1;
  rnag: RNA => GTP; arnag*RNA^rnag_frnan11;
    arnag = 0.04615; rnag_frnan11 = 1;
  trans: SAM => ATP; atrans*SAM^ftrans5;
    atrans = 8.8539; ftrans5 = 0.33;
  ua: UA => ; aua*UA^fua16;
    aua = 8.744e-5; fua16 = 2.21;
  x: Xa => ; ax*Xa^fx14;
    ax = 0.0012; fx14 = 2;
  xd: Xa => UA; axd*Xa^fxd14;
    axd = 0.949; fxd14 = 0.55;
end
